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/BATCH
/COM,ANSYS RELEASE Release 18.2      BUILD 18.2      UP20170726       14:52:47
/input,menust,tmp,''
/GST,ON
/PLO,INFO,3
/GRO,CURL,ON
/CPLANE,1
WPSTYLE,,,,,,,,0
RESUME
/COM,ANSYS RELEASE Release 18.2      BUILD 18.2      UP20170726       14:52:52
/NUMBER,0
/NUMBER,0
/SOLU
FINISH
/PREP7
/NUMBER,0
/NUMBER,0
/NUMBER,0
/NUMBER,0
/NUMBER,0
MPTEMP,,,,,,,,
MPTEMP,1,0
MPDE,DENS,1
MPDATA,DENS,1,,2500
R,3,30000000,0,0, , ,0,
RMORE,0,
FLST,2,7,4,ORDE,2
FITEM,2,1
FITEM,2,-7
LMESH,P51X
/NUMBER,0
SAVE
SAVE
SAVE
FINISH
! /EXIT,ALL
/BATCH
/COM,ANSYS RELEASE Release 18.2      BUILD 18.2      UP20170726       15:45:43
/input,menust,tmp,''
/GST,ON
/PLO,INFO,3
/GRO,CURL,ON
/CPLANE,1
WPSTYLE,,,,,,,,0
RESUME
/COM,ANSYS RELEASE Release 18.2      BUILD 18.2      UP20170726       15:45:46
/POST1
FINISH
/SOL
FINISH
/PREP7
FINISH
! /EXIT,NOSAV
/BATCH
/BATCH
/BATCH
/COM,ANSYS RELEASE Release 18.2      BUILD 18.2      UP20170726       22:04:13
/input,menust,tmp,''
/GST,ON
/PLO,INFO,3
/GRO,CURL,ON
/CPLANE,1
WPSTYLE,,,,,,,,0
RESUME
/COM,ANSYS RELEASE Release 18.2      BUILD 18.2      UP20170726       22:04:17
/POST1
FINISH
/PREP7
wpstyl,,,,,,,,1
nplot
FINISH
! /EXIT,NOSAV
/BATCH
/COM,ANSYS RELEASE Release 18.2      BUILD 18.2      UP20170726       22:05:45
/input,menust,tmp,''
/GST,ON
/PLO,INFO,3
/GRO,CURL,ON
/CPLANE,1
WPSTYLE,,,,,,,,0
/PREP7
RESUME
/COM,ANSYS RELEASE Release 18.2      BUILD 18.2      UP20170726       22:06:35
/BATCH
/COM,ANSYS RELEASE Release 18.2      BUILD 18.2      UP20170726       23:41:53
/input,menust,tmp,''
/GST,ON
/PLO,INFO,3
/GRO,CURL,ON
/CPLANE,1
WPSTYLE,,,,,,,,0
/NOPR
KEYW,PR_SET,1
KEYW,PR_STRUC,1
KEYW,PR_THERM,0
KEYW,PR_FLUID,0
KEYW,PR_ELMAG,0
KEYW,MAGNOD,0
KEYW,MAGEDG,0
KEYW,MAGHFE,0
KEYW,MAGELC,0
KEYW,PR_MULTI,0
/GO
/COM,
/COM,Preferences for GUI filtering have been set to display:
/COM,  Structural
/NOPR
KEYW,PR_SET,1
KEYW,PR_STRUC,1
KEYW,PR_THERM,0
KEYW,PR_FLUID,0
KEYW,PR_ELMAG,0
KEYW,MAGNOD,0
KEYW,MAGEDG,0
KEYW,MAGHFE,0
KEYW,MAGELC,0
KEYW,PR_MULTI,0
/GO
/COM,
/COM,Preferences for GUI filtering have been set to display:
/COM,  Structural
/PREP7
ET,1,BEAM188
ET,2,COMBIN14
SECTYPE,   1, BEAM, RECT, , 0
SECOFFSET, CENT
SECDATA,1,0.65,0,0,0,0,0,0,0,0,0,0
SECTYPE,   2, BEAM, RECT, , 0
SECOFFSET, CENT
SECDATA,1,0.85,0,0,0,0,0,0,0,0,0,0
MPTEMP,,,,,,,,
MPTEMP,1,0
MPDATA,DENS,1,,2500
MPTEMP,,,,,,,,
MPTEMP,1,0
MPDATA,EX,1,,3e10
MPDATA,PRXY,1,,0.2
R,1,30000000, , , , , ,
RMORE, ,
K,1,0,0,0
K,2,,3.85,,
K,3,0.88,5.5,0
K,4,2.45，6.15，0
K,4,2.45，6.15，0
K,4,2.45,6.15,0
K,5,4.02,5.5,0
K,6,4.9,3.85,0
K,7,4.9,0,0
LARC,1,2,6,8.13,
LARC,2,3,6,3.21
LARC,3,4,6,2.22
LARC,4,5,2,2.22
LARC,5,6,2,3.21
LARC,6,7,2,8.13
LARC,7,1,4,6
ALLSEL,ALL
GPLOT
/NUMBER,0
/NUMBER,0
SAVE
SAVE
FLST,5,6,4,ORDE,2
FITEM,5,1
FITEM,5,-6
CM,_Y,LINE
LSEL, , , ,P51X
CM,_Y1,LINE
CMSEL,S,_Y
CMSEL,S,_Y1
LATT,1,1,1, , , ,1
CMSEL,S,_Y
CMDELE,_Y
CMDELE,_Y1
CM,_Y,LINE
LSEL, , , ,       7
CM,_Y1,LINE
CMSEL,S,_Y
CMSEL,S,_Y1
LATT,1,1,1, , , ,2
CMSEL,S,_Y
CMDELE,_Y
CMDELE,_Y1
FLST,5,2,4,ORDE,2
FITEM,5,1
FITEM,5,6
CM,_Y,LINE
LSEL, , , ,P51X
CM,_Y1,LINE
CMSEL,,_Y
LESIZE,_Y1, , ,4, , , , ,1
FLST,5,4,4,ORDE,2
FITEM,5,2
FITEM,5,-5
CM,_Y,LINE
LSEL, , , ,P51X
CM,_Y1,LINE
CMSEL,,_Y
LESIZE,_Y1, , ,2, , , , ,1
FLST,5,1,4,ORDE,1
FITEM,5,7
CM,_Y,LINE
LSEL, , , ,P51X
CM,_Y1,LINE
CMSEL,,_Y
LESIZE,_Y1, , ,8, , , , ,1
/NUMBER,0
/NUMBER,0
/NUMBER,0
FLST,2,7,4,ORDE,2
FITEM,2,1
FITEM,2,-7
LMESH,P51X
PSPRNG,1,,30000000,0.97029572,-0.241921895,0
RESUME
/COM,ANSYS RELEASE Release 18.2      BUILD 18.2      UP20170726       00:33:20
FLST,5,6,4,ORDE,2
FITEM,5,1
FITEM,5,-6
CM,_Y,LINE
LSEL, , , ,P51X
CM,_Y1,LINE
CMSEL,S,_Y
CMSEL,S,_Y1
LATT,1,1,1, , , ,1
CMSEL,S,_Y
CMDELE,_Y
CMDELE,_Y1
CM,_Y,LINE
LSEL, , , ,       7
CM,_Y1,LINE
CMSEL,S,_Y
CMSEL,S,_Y1
LATT,1,1,1, , , ,2
CMSEL,S,_Y
CMDELE,_Y
CMDELE,_Y1
FLST,5,2,4,ORDE,2
FITEM,5,1
FITEM,5,6
CM,_Y,LINE
LSEL, , , ,P51X
CM,_Y1,LINE
CMSEL,,_Y
LESIZE,_Y1, , ,4, , , , ,1
FLST,5,4,4,ORDE,2
FITEM,5,2
FITEM,5,-5
CM,_Y,LINE
LSEL, , , ,P51X
CM,_Y1,LINE
CMSEL,,_Y
LESIZE,_Y1, , ,2, , , , ,1
FLST,5,1,4,ORDE,1
FITEM,5,7
CM,_Y,LINE
LSEL, , , ,P51X
CM,_Y1,LINE
CMSEL,,_Y
LESIZE,_Y1, , ,8, , , , ,1
FLST,2,7,4,ORDE,2
FITEM,2,1
FITEM,2,-7
LMESH,P51X
/NUMBER,0
/NUMBER,0
SAVE
PSPRNG,1,,30000000,-0.97029572,-0.241921895,0
PSPRNG,2,,30000000,-0.97437006,0.22495105,0
PSPRNG,3,,30000000,-0.98628560,-0.1604768,0
PSPRNG,4,,30000000,-0.99996192,- 0.00872654,0
PSPRNG,5,,30000000,-0.98901586,
! 0.14780941,0
NDELE,      29
MDELE,29
RESUME
/COM,ANSYS RELEASE Release 18.2      BUILD 18.2      UP20170726       00:43:58
PSPRNG,1,,30000000,0.97029572,-0.241921895,0
RESUME
/COM,ANSYS RELEASE Release 18.2      BUILD 18.2      UP20170726       00:44:04
PSPRNG,1,,30000000,-0.97029572,-0.241921895,0
PSPRNG,2,,30000000,-0.97437006,0.22495105,0
PSPRNG,3,,30000000,-0.98628560,-0.1604768,0
PSPRNG,4,,30000000,-0.99996192,- 0.00872654,0
PSPRNG,5,,30000000,-0.98901586,0.14780941,0
PSPRNG,6,,30000000,-0.70710678,0.70710678,0
PSPRNG,7,,30000000,-0.88294757,0.469471561,0
PSPRNG,10,,30000000,0.70710678,0.70710678,0
PSPRNG,13,,30000000,0.88294757,0.469471561,0
PSPRNG,12,,30000000,0.97437006,0.22495105,0
PSPRNG,15,,30000000,0.98901586,0.14780941,0
PSPRNG,16,,30000000,0.99996192,-0.00872654,0
PSPRNG,17,,30000000,0.98628560,-0.1604768,0
PSPRNG,18,,30000000,0.30901699.-0.95105651,0
RESUME
/COM,ANSYS RELEASE Release 18.2      BUILD 18.2      UP20170726       00:48:09
PSPRNG,1,,30000000,-0.97029572,-0.241921895,0
PSPRNG,2,,30000000,-0.97437006,0.22495105,0
PSPRNG,3,,30000000,-0.98628560,-0.1604768,0
PSPRNG,4,,30000000,-0.99996192,- 0.00872654,0
PSPRNG,5,,30000000,-0.98901586,0.14780941,0
PSPRNG,6,,30000000,-0.70710678,0.70710678,0
PSPRNG,7,,30000000,-0.88294757,0.469471561,0
PSPRNG,10,,30000000,0.70710678,0.70710678,0
PSPRNG,13,,30000000,0.88294757,0.469471561,0
PSPRNG,12,,30000000,0.97437006,0.22495105,0
PSPRNG,15,,30000000,0.98901586,0.14780941,0
PSPRNG,16,,30000000,0.99996192,-0.00872654,0
PSPRNG,17,,30000000,0.98628560,-0.1604768,0
PSPRNG,18,,30000000,0.30901699,-0.95105651,0
RESUME
/COM,ANSYS RELEASE Release 18.2      BUILD 18.2      UP20170726       00:49:05
PSPRNG,1,,30000000,-0.97029572,-0.241921895,0
PSPRNG,2,,30000000,-0.97437006,0.22495105,0
PSPRNG,3,,30000000,-0.98628560,-0.1604768,0
PSPRNG,4,,30000000,-0.99996192,- 0.00872654,0
PSPRNG,5,,30000000,-0.98901586,0.14780941,0
PSPRNG,6,,30000000,-0.70710678,0.70710678,0
PSPRNG,7,,30000000,-0.88294757,0.469471561,0
PSPRNG,10,,30000000,0.70710678,0.70710678,0
PSPRNG,13,,30000000,0.88294757,0.469471561,0
PSPRNG,12,,30000000,0.97437006,0.22495105,0
PSPRNG,15,,30000000,0.98901586,0.14780941,0
PSPRNG,16,,30000000,0.99996192,-0.00872654,0
PSPRNG,17,,30000000,0.98628560,-0.1604768,0
PSPRNG,18,,30000000,0.30901699,-0.95105651,0
PSPRNG,24,,30000000,-0.30901699,-0.95105651,0
PSPRNG,19,,30000000,0.20791169,-0.97814760,0
PSPRNG,23,,30000000,-0.20791169,-0.97814760,0
PSPRNG,20,,30000000,0.10452846,-0.99452189,0
PSPRNG,22,,30000000,-0.10452846,-0.99452189,0
RESUME
/COM,ANSYS RELEASE Release 18.2      BUILD 18.2      UP20170726       00:54:35
PSPRNG,1,,30000000,-0.97029572,-0.241921895,0
PSPRNG,2,,30000000,-0.97437006,0.22495105,0
PSPRNG,3,,30000000,-0.98628560,-0.1604768,0
PSPRNG,4,,30000000,-0.99996192,- 0.00872654,0
PSPRNG,5,,30000000,-0.98901586,0.14780941,0
PSPRNG,6,,30000000,-0.70710678,0.70710678,0
PSPRNG,7,,30000000,-0.88294757,0.469471561,0
PSPRNG,10,,30000000,0.70710678,0.70710678,0
PSPRNG,13,,30000000,0.88294757,0.469471561,0
PSPRNG,12,,30000000,0.97437006,0.22495105,0
PSPRNG,15,,30000000,0.98901586,0.14780941,0
PSPRNG,16,,30000000,0.99996192,-0.00872654,0
PSPRNG,17,,30000000,0.98628560,-0.1604768,0
PSPRNG,14,,30000000,0.97029572,-0.241921895,0
PSPRNG,18,,30000000,0.30901699,-0.95105651,0
PSPRNG,24,,30000000,-0.30901699,-0.95105651,0
PSPRNG,19,,30000000,0.20791169,-0.97814760,0
PSPRNG,23,,30000000,-0.20791169,-0.97814760,0
PSPRNG,20,,30000000,0.10452846,-0.99452189,0
PSPRNG,22,,30000000,-0.10452846,-0.99452189,0
PSPRNG,22,,30000000,0,-1,0
RESUME
/COM,ANSYS RELEASE Release 18.2      BUILD 18.2      UP20170726       00:57:06
PSPRNG,1,,30000000,-0.97029572,-0.241921895,0
PSPRNG,2,,30000000,-0.97437006,0.22495105,0
PSPRNG,3,,30000000,-0.98628560,-0.1604768,0
PSPRNG,4,,30000000,-0.99996192,- 0.00872654,0
PSPRNG,5,,30000000,-0.98901586,0.14780941,0
PSPRNG,6,,30000000,-0.70710678,0.70710678,0
PSPRNG,7,,30000000,-0.88294757,0.469471561,0
PSPRNG,10,,30000000,0.70710678,0.70710678,0
PSPRNG,13,,30000000,0.88294757,0.469471561,0
PSPRNG,12,,30000000,0.97437006,0.22495105,0
PSPRNG,15,,30000000,0.98901586,0.14780941,0
PSPRNG,16,,30000000,0.99996192,-0.00872654,0
PSPRNG,17,,30000000,0.98628560,-0.1604768,0
PSPRNG,14,,30000000,0.97029572,-0.241921895,0
PSPRNG,18,,30000000,0.30901699,-0.95105651,0
PSPRNG,24,,30000000,-0.30901699,-0.95105651,0
PSPRNG,19,,30000000,0.20791169,-0.97814760,0
PSPRNG,23,,30000000,-0.20791169,-0.97814760,0
PSPRNG,20,,30000000,0.10452846,-0.99452189,0
PSPRNG,22,,30000000,-0.10452846,-0.99452189,0
PSPRNG,21,,30000000,0,-1,0
SAVE
FINISH
/SOL
FLST,2,21,1,ORDE,5
FITEM,2,1
FITEM,2,-7
FITEM,2,10
FITEM,2,12
FITEM,2,-24
/GO
D,P51X, ,0, , , ,UX,UY,UZ, , ,
RESUME
/COM,ANSYS RELEASE Release 18.2      BUILD 18.2      UP20170726       01:04:48
FLST,2,21,1,ORDE,2
FITEM,2,25
FITEM,2,-45
/GO
D,P51X, ,0, , , ,UX,UY,UZ, , ,
ACEL,0,9.8,0,
SAVE
FLST,2,24,1,ORDE,2
FITEM,2,1
FITEM,2,-24
FINISH
! /EXIT,NOSAV
/BATCH
/COM,ANSYS RELEASE Release 18.2      BUILD 18.2      UP20170726       23:01:45
/input,menust,tmp,''
/GST,ON
/PLO,INFO,3
/GRO,CURL,ON
/CPLANE,1
WPSTYLE,,,,,,,,0
RESUME
/COM,ANSYS RELEASE Release 18.2      BUILD 18.2      UP20170726       23:01:49
/SOLU
FLST,2,17,1,ORDE,2
FITEM,2,1
FITEM,2,-17
/GO
F,P51X,FY,-80225
FLST,2,7,1,ORDE,2
FITEM,2,18
FITEM,2,-24
/GO
F,P51X,FY,80225
FLST,2,12,1,ORDE,4
FITEM,2,1
FITEM,2,-9
FITEM,2,22
FITEM,2,-24
/GO
F,P51X,FX,16045
FLST,2,12,1,ORDE,2
FITEM,2,10
FITEM,2,-21
/GO
F,P51X,FX,-16045
SAVE
FLST,2,1,1,ORDE,1
FITEM,2,18
/GO
F,P51X,FX,-161803
FLST,2,1,1,ORDE,1
FITEM,2,19
RESUME
/COM,ANSYS RELEASE Release 18.2      BUILD 18.2      UP20170726       23:35:24
FLST,2,1,1,ORDE,1
FITEM,2,18
/GO
F,P51X,FX,-161803
FLST,2,1,1,ORDE,1
FITEM,2,18
/GO
F,P51X,FY,70381
FLST,2,1,1,ORDE,1
FITEM,2,19
/GO
F,P51X,FY,50101
FLST,2,1,1,ORDE,1
FITEM,2,19
/GO
F,P51X,FX,-182309
FLST,2,1,1,ORDE,1
FITEM,2,20
/GO
F,P51X,FY,13093
FLST,2,1,1,ORDE,1
FITEM,2,20
/GO
F,P51X,FX,-198904
FLST,2,1,1,ORDE,1
FITEM,2,21
/GO
F,P51X,FY,125960
FLST,2,1,1,ORDE,1
FITEM,2,21
/GO
F,P51X,FX,0
FLST,2,1,1,ORDE,1
FITEM,2,22
/GO
F,P51X,FY,13093
FLST,2,1,1,ORDE,1
FITEM,2,22
/GO
F,P51X,FX,198904
FLST,2,1,1,ORDE,1
FITEM,2,23
/GO
F,P51X,FY,50101
FLST,2,1,1,ORDE,1
FITEM,2,23
/GO
F,P51X,FX,-182309
FLST,2,1,1,ORDE,1
FITEM,2,24
/GO
F,P51X,FY,70381
FLST,2,1,1,ORDE,1
FITEM,2,24
/GO
F,P51X,FY,-161803
FLST,2,1,1,ORDE,1
FITEM,2,24
RESUME
/COM,ANSYS RELEASE Release 18.2      BUILD 18.2      UP20170726       23:42:01
FLST,2,1,1,ORDE,1
FITEM,2,18
/GO
F,P51X,FX,-161803
FLST,2,1,1,ORDE,1
FITEM,2,18
/GO
F,P51X,FY,70381
FLST,2,1,1,ORDE,1
FITEM,2,19
/GO
F,P51X,FY,50101
FLST,2,1,1,ORDE,1
FITEM,2,19
/GO
F,P51X,FX,-182309
FLST,2,1,1,ORDE,1
FITEM,2,20
/GO
F,P51X,FY,13093
FLST,2,1,1,ORDE,1
FITEM,2,20
/GO
F,P51X,FX,-198904
FLST,2,1,1,ORDE,1
FITEM,2,21
/GO
F,P51X,FY,125960
FLST,2,1,1,ORDE,1
FITEM,2,21
/GO
F,P51X,FX,0
FLST,2,2,1,ORDE,2
FITEM,2,21
FITEM,2,40
FLST,2,1,1,ORDE,1
FITEM,2,22
/GO
F,P51X,FY,13093
FLST,2,1,1,ORDE,1
FITEM,2,22
/GO
F,P51X,FX,198904
FLST,2,1,1,ORDE,1
FITEM,2,23
/GO
F,P51X,FY,50101
FLST,2,1,1,ORDE,1
FITEM,2,23
/GO
F,P51X,FY,-182309
RESUME
/COM,ANSYS RELEASE Release 18.2      BUILD 18.2      UP20170726       23:51:31
FLST,2,1,1,ORDE,1
FITEM,2,18
/GO
F,P51X,FX,-161803
FLST,2,1,1,ORDE,1
FITEM,2,18
/GO
F,P51X,FY,70381
FLST,2,1,1,ORDE,1
FITEM,2,19
/GO
F,P51X,FY,50101
FLST,2,1,1,ORDE,1
FITEM,2,19
/GO
F,P51X,FX,-182309
FLST,2,1,1,ORDE,1
FITEM,2,20
/GO
F,P51X,FY,13093
FLST,2,1,1,ORDE,1
FITEM,2,20
/GO
F,P51X,FX,-198904
FLST,2,1,1,ORDE,1
FITEM,2,21
/GO
F,P51X,FY,125960
FLST,2,1,1,ORDE,1
FITEM,2,21
/GO
F,P51X,FX,0
FLST,2,1,1,ORDE,1
FITEM,2,22
/GO
F,P51X,FY,13093
FLST,2,1,1,ORDE,1
FITEM,2,22
/GO
F,P51X,FX,198904
FLST,2,1,1,ORDE,1
FITEM,2,23
/GO
F,P51X,FY,50101
FLST,2,1,1,ORDE,1
FITEM,2,23
/GO
F,P51X,FX,-182309
FLST,2,1,1,ORDE,1
FITEM,2,24
/GO
F,P51X,FY,70381
FLST,2,1,1,ORDE,1
FITEM,2,24
/GO
F,P51X,FX,-161803
SAVE
